// COMSOL Multiphysics 5.3.0.223 model "SimpleDomainDDM.mph"
// Outline of the model tree

Geometry
  geom1 "Geometry 1" (3D, length unit m)
    blk1: Block | pos = {0.5, 0.5, 0.5}; base = center; size = {1, 1, 0.02}
    blk2: Block | pos = {1.5, 0.5, 0.5}; base = center; size = {1, 1, 0.01}
    fin: Finalize "Form Union"

Physics
  dl: DarcysLaw on all domains
    dependent variable p
    dlm1: DarcysLawModel "Fluid and Matrix Properties 1" (default)
      rho_mat = userdef
      rho = 1
      mu_mat = userdef
      mu = 0.001
      epsilon_mat = userdef
      epsilon = 1
      kappa_mat = userdef
      kappa = 1e-3
    nf1: NoFlow (default)
    init1: init "Initial Values 1" (default)
    dlm2: DarcysLawModel "Fluid and Matrix Properties 2" on domains 2
      rho_mat = userdef
      rho = 1
      mu_mat = userdef
      mu = 0.001
      epsilon_mat = userdef
      epsilon = 1
      kappa_mat = userdef
      kappa = 1e-2
    pr1: Pressure2 on boundaries 1 | p0 = 100
    pr2: Pressure2 (disabled) on boundaries 13 | p0 = 10
    mf1: MassFlux2 on boundaries 13 | N0 = -50

Mesh
  mesh1 "Mesh 1" (physics-controlled)
    size: MeshSizeDefault | hauto = 7

Studies
  std1 "Study 1"
    stat: Stationary

Solver configurations
  sol1 "Solution 1" (study std1)
    v1: Variables "Dependent Variables 1"
    s1: Stationary "Stationary Solver 1"
      dDef: Direct
      fc1: FullyCoupled | linsolver = dDef

Datasets
  dset1: Solution | solution = sol1
  cln1: CutLine3D | data = dset1; genpoints = {{0, 0.5, 0.5}, {2, 0.5, 0.5}}

Tables
  tbl2: Table
    // Point Evaluation 1 (p, dl.u, dl.v)
    Pressure (Pa), Point: 3 | Darcy's velocity field, X component (m/s), Point: 3 | Darcy's velocity field, Y component (m/s), Point: 3
    66.6667 | 33.3333 | 1.17476e-12

Plots
  pg1: PlotGroup3D "Velocity" | data = dset1
    arwv1: ArrowVolume | expr = {dl.u, dl.v, dl.w}
      col1: Color "Color Expression 1" | expr = dl.u
  pg2: PlotGroup3D "Pressure (dl) 1" | data = dset1
    surf1: Surface | expr = p
  pg3: PlotGroup1D "1D Plot Group 3" | data = dset1
    lngr1: LineGraph | data = cln1; expr = p
    lngr2: LineGraph | data = cln1; expr = dl.u